// COMSOL Multiphysics 5.3.1.180 model "L-IT_A123_v1.0.mph"
// Outline of the model tree

Parameters
  Lcc = 0.4[mm]  // Current collector thickness
  Lx = 2.7[mm]  // Electrode thickness
  Ly = 150[mm]  // Electrode width
  Lz = 200[mm]  // Electrode height
  Wtab = 48[mm]  // Tab width
  Htab = 25[mm]  // Tab height
  Ltab = 0.25[mm]  // Tab thickness
  Itab = 10[mm]  // Shifted position of tabs
  F = 96487[C/mol]  // Farday constant
  R = 8.3143[J/mol/K]  // Gas constant
  n = 1  // Number of electrons
  Nlayer = 40  // Layers of electrodes
  av = 10^7[m^-1]  // Specific interfacial area per unit volume (From Newman book problem 22.1) ** changed for reaction distribution **
  Tinf = 23.8495[degC]  // Room temperature
  Cpel = 2.0297e6[J/m^3/K]  // Heat capacitance of the solid phase (Srinivasan & Wang)
  Cpcc = 3.1363e6[J/m^3/K]  // (Srinivasan & Wang) 700 [J/kg/K]
  keff = 120.5121[W/m/K]  // Thermal conductivity of separator (Srinivasan & Wang)
  h1 = 10.1154[W/m^2/K]  // convective coefficient ** fitting parameter **
  Qmax = (20*3600/(200*150*5.4))[C/mm^3]  // Capacity of battery
  Crate = 4  // C-rate
  iapp = 20[A]*Crate/(Wtab*Ltab*13)  // Current density
  ku = 0.2062[V]  // Slope of OCV curve
  keref = 25.1770[S/m]  // Ionic conductivity at Tinf
  alfa_ke = 5.1076[S/m/K]  // Temp dependence of keref
  i0ref = 11.8953[A/m^2]  // Exch current dens at Tinf
  Ei0 = 29.8804[kJ/mol]  // Temp dependence of Ei0 (also act.nrg)

Functions
  wv1: Wave "Waveform 1" | type = square; freq = 2*pi*.01; phase = 2*pi/100*.05

Variables
  var1 "Variables CC - Cu" on domains 2, 3
    kappa_s = (1e7)*Nlayer^2[S/m]  // Electrical conductivity
    ks = 380[W/m/K]  // Thermal conductivity
  var2 "Variables Anode" on domains 4
    ik = i0*n*F/R/T*(Phis-Phie-ku*q-0.01*wv1(root.t[1/s]))
    kappa_s = (Nlayer^2)/0.01[m/S]  // LiC6 conductivity (M. Doyle and Y. Fuentes JECS 2003)
    kappa_e = keref+(T-Tinf)*alfa_ke
    i0 = i0ref*exp(-Ei0/R*(1/T-1/Tinf))
    DelSrxn = -0.05[mV/K]*n*F
  var3 "Variables Cathode" on domains 6
    ik = i0*n*F/R/T*(Phis-Phie-ku*q+0.01*wv1(root.t[1/s]))  // i0*n*F/R/Tinf*(Phis-Phie-ku*q-0.01*wv1(root.t[1/s]))
    kappa_s = (Nlayer^2)/0.01[m/S]  // LiC6 conductivity (M. Doyle and Y. Fuentes JECS 2003)
    kappa_e = keref+(T-Tinf)*alfa_ke
    i0 = i0ref*exp(-Ei0/R*(1/T-1/Tinf))
    DelSrxn = 0.05[mV/K]*n*F
  var4 "Variables CC - Al" on domains 7, 8
    kappa_s = (1e7)*Nlayer^2[S/m]
    ks = 380[W/m/K]  // Thermal conductivity of anode (Srinivasan & Wang: 200W/m/K)
  var5 "Variables Copper" on domains 1, 5
    kappa_s = (6e7)*Nlayer^2[S/m]
    ks = 380[W/m/K]  // Thermal conductivity of anode (Srinivasan & Wang: 200W/m/K)

Pairs
  ap1: Identity "Identity Boundary Pair 1" | source: boundaries 3; destination: boundaries 16
  ap2: Identity "Identity Boundary Pair 2" | source: boundaries 10; destination: boundaries 15
  ap3: Identity "Identity Boundary Pair 3" | source: boundaries 12; destination: boundaries 19
  ap4: Identity "Identity Boundary Pair 4" | source: boundaries 24; destination: boundaries 31
  ap5: Identity "Identity Boundary Pair 5" | source: boundaries 27; destination: boundaries 46
  ap6: Identity "Identity Boundary Pair 6" | source: boundaries 36; destination: boundaries 37
  ap7: Identity "Identity Boundary Pair 7" | source: boundaries 40; destination: boundaries 45

Geometry
  geom1 "Geometry 1" (3D, length unit mm)
    blk1: Block "Anode" | axistype = cartesian; size = {Lx, Ly, Lz}
    blk2: Block "Anode CC" | pos = {-Lcc, 0, 0}; axistype = cartesian; size = {Lcc, Ly, Lz}
    blk3: Block "Cathode" | pos = {Lx, 0, 0}; axistype = cartesian; size = {Lx, Ly, Lz}
    blk4: Block "Cathode CC" | pos = {Lx*2, 0, 0}; axistype = cartesian; size = {Lcc, Ly, Lz}
    wp1: WorkPlane | quickz = Lz; workplane3d = on
      r1: Rectangle | pos = {-Lcc, Itab}; size = {Ltab, Wtab}
    ext1: Extrude "Anode CC tab" | workplane = wp1; input = wp1; distance = Htab
    wp2: WorkPlane | quickz = Lz; workplane3d = on
      r1: Rectangle | pos = {2*Lx+(Lcc-Ltab), Ly-Wtab-Itab}; size = {Ltab, Wtab}
    ext2: Extrude "Cathode CC tab 1" | workplane = wp2; input = wp2; distance = Htab
    wp3: WorkPlane | quickz = Lz+Htab; workplane3d = on
      r1: Rectangle | pos = {-Lcc-Ltab*12, Itab}; size = {Ltab*13, Wtab}
    ext3: Extrude "Anode Copper Bar" | workplane = wp3; input = wp3; distance = 6[in]
    wp4: WorkPlane | quickz = Lz+Htab; workplane3d = on
      r1: Rectangle | pos = {2*Lx+(Lcc-Ltab)-Ltab*12, Ly-Wtab-Itab}; size = {Ltab*13, Wtab}
    ext4: Extrude "Cathode Copper Bar" | workplane = wp4; input = wp4; distance = 6[in]
    fin: Finalize "Form Assembly" | action = assembly

Physics
  g: GeneralFormPDE "Phis" on all domains
    dependent variable Phis
    Units.DependentVariableQuantity = electricpotential
    Units.SourceTermQuantity = currentsource
    gfeq1: GeneralFormPDE (default)
      f = -av*ik
      Ga = {-kappa_s*Phisx, -kappa_s*Phisy/Nlayer^2, -kappa_s*Phisz/Nlayer^2}
      da = 0
    zflx1: ZeroFluxBoundary "Zero Flux 1" (default)
    init1: init "Initial Values 1" (default) | Phis = 3.232
    flux1: FluxBoundary "Current Source" on boundaries 4 | g = wv1(root.t[1/s])*iapp
    flux2: FluxBoundary "Flux/Source 2" on boundaries 10, 40
    cont1: Continuity on all boundaries | pairs = ap1
      zflx1: ZeroFluxBoundary "Zero Flux 1" (default)
    cont2: Continuity on all boundaries | pairs = ap2
      zflx1: ZeroFluxBoundary "Zero Flux 1" (default)
    cont3: Continuity on all boundaries | pairs = ap3
      zflx1: ZeroFluxBoundary "Zero Flux 1" (default)
    cont4: Continuity on all boundaries | pairs = ap5
      zflx1: ZeroFluxBoundary "Zero Flux 1" (default)
    cont5: Continuity on all boundaries | pairs = ap6
      zflx1: ZeroFluxBoundary "Zero Flux 1" (default)
    cont6: Continuity on all boundaries | pairs = ap7
      zflx1: ZeroFluxBoundary "Zero Flux 1" (default)
    gfeq2: GeneralFormPDE on domains 2, 7
      f = 0
      Ga = {-kappa_s*Phisx, -kappa_s*Phisy/Nlayer^2, -kappa_s*Phisz/Nlayer^2}
      da = 0
    dir1: DirichletBoundary "Dirichlet Boundary Condition 1" on boundaries 28 | r = 3.232
    gfeq3: GeneralFormPDE on domains 1, 3, 5, 8
      f = 0
      Ga = {-kappa_s*Phisx/Nlayer^2, -kappa_s*Phisy/Nlayer^2, -kappa_s*Phisz/Nlayer^2}
      da = 0
  g2: GeneralFormPDE "Phie" on domains 4, 6
    dependent variable Phie
    Units.DependentVariableQuantity = electricpotential
    Units.SourceTermQuantity = currentsource
    gfeq1: GeneralFormPDE (default)
      f = av*ik
      Ga = {-kappa_e*Phiex, -kappa_e*Phiey/Nlayer^2, -kappa_e*Phiez/Nlayer^2}
      da = 0
    zflx1: ZeroFluxBoundary "Zero Flux 1" (default)
    init1: init "Initial Values 1" (default) | Phie = 3.232
    cont1: Continuity on all boundaries | pairs = ap4
      zflx1: ZeroFluxBoundary "Zero Flux 1" (default)
  g3: GeneralFormPDE "T" on all domains
    dependent variable T
    Units.DependentVariableQuantity = temperature
    Units.SourceTermQuantity = powerdensity
    gfeq1: GeneralFormPDE (default)
      f = kappa_s*(Phisx^2+Phisy^2/Nlayer^2+Phisz^2/Nlayer^2) +kappa_e*(Phiex^2+Phiey^2/Nlayer^2+Phiez^2/Nlayer^2)+av*R*T/(i0*n*F)*ik^2-av*T*DelSrxn/n/F*ik
      Ga = {-keff*Tx, -keff*Ty, -keff*Tz}
      da = Cpel
    zflx1: ZeroFluxBoundary "Zero Flux 1" (default)
    init1: init "Initial Values 1" (default) | T = Tinf; Tt = 1
    flux1: FluxBoundary "Flux/Source 1" on boundaries 3, 4, 6-11, 13, 14, 17, 18, 20-23, 27, 28, 30, 32-35, 38-44, 47, 48
      g = -h1*(T-Tinf)
    gfeq2: GeneralFormPDE on domains 2, 7
      f = kappa_s*(Phisx^2+Phisy^2/Nlayer^2+Phisz^2/Nlayer^2)
      Ga = {-ks*Tx, -ks*Ty, -ks*Tz}
      da = Cpcc
    cont1: Continuity on all boundaries | pairs = ap1
      zflx1: ZeroFluxBoundary "Zero Flux 1" (default)
    cont2: Continuity on all boundaries | pairs = ap2
      zflx1: ZeroFluxBoundary "Zero Flux 1" (default)
    cont3: Continuity on all boundaries | pairs = ap3
      zflx1: ZeroFluxBoundary "Zero Flux 1" (default)
    cont4: Continuity on all boundaries | pairs = ap4
      zflx1: ZeroFluxBoundary "Zero Flux 1" (default)
    cont5: Continuity on all boundaries | pairs = ap5
      zflx1: ZeroFluxBoundary "Zero Flux 1" (default)
    cont6: Continuity on all boundaries | pairs = ap6
      zflx1: ZeroFluxBoundary "Zero Flux 1" (default)
    cont7: Continuity on all boundaries | pairs = ap7
      zflx1: ZeroFluxBoundary "Zero Flux 1" (default)
    gfeq3: GeneralFormPDE on domains 1, 3, 5, 8
      f = kappa_s*(Phisx^2/Nlayer^2+Phisy^2/Nlayer^2+Phisz^2/Nlayer^2)
      Ga = {-ks*Tx, -ks*Ty, -ks*Tz}
      da = Cpcc
  g4: GeneralFormPDE "q" on domains 4, 6
    dependent variable q
    Units.CustomSourceTermUnit = s^-1
    gfeq1: GeneralFormPDE (default) | f = av*ik/Qmax; Ga = {0, 0, 0}; da = 1
    zflx1: ZeroFluxBoundary "Zero Flux 1" (default)
    init1: init "Initial Values 1" (default) | q = 0.5; qt = 0.001

Mesh
  mesh2 "Mesh 1"
    size: MeshSizeDefault | hauto = 8
    ftet2: FreeTet "Free Tetrahedral 2" on domains 1-3, 5, 7, 8 | xscale = 10
    ftet3: FreeTet "Free Tetrahedral 3" on remaining entities | xscale = 2

Studies
  std1 "Study 1"
    time: Transient "Time Dependent" | tlist = range(0,1,2500)

Solver configurations
  sol1 "Solution 1" (study std1)
    v1: Variables "Dependent Variables 1"
    t1: Time "Time-Dependent Solver 1" | tlist = range(0,1,2500); rtol = 1e-3
      dDef: Direct
      fc1: FullyCoupled

Datasets
  dset1: Solution | solution = sol1
  cpt1: CutPoint3D "Voltage" | data = dset1; pointx = -Lcc; pointy = 3/4*Ly; pointz = Lz+Htab+6[in]
  cpt2: CutPoint3D "Cold Spot" | data = dset1; pointx = -Lcc; pointy = Ly-25; pointz = Lz-155; pointvar = cpt1n
  cpt3: CutPoint3D "Hot Spot" | data = dset1; pointx = -Lcc; pointy = Ly-75; pointz = Lz-30; pointvar = cpt1n
  cpt4: CutPoint3D "Copper Bar"
    data = dset1
    pointx = -Ltab*13
    pointy = 3/4*Ly
    pointz = Lz+Htab+4[in]
    pointvar = cpt1n
  cln1: CutLine3D "Cut Line 3D z=L" | data = dset1; genpoints = {{-Lcc, Ly/2, Lz}, {2*Lx+Lcc, Ly/2, Lz}}

Derived values
  pev3: EvalPoint "Hot" | data = cpt3; table = tbl1; expr = T; unit = degC
  av1: AvSurface "Surf. Avg" on boundaries 7 | data = dset1; table = tbl1; expr = T; unit = degC
  pev2: EvalPoint "Cold" | data = cpt2; table = tbl1; expr = T; unit = degC
  pev1: EvalPoint "Voltage" | data = cpt1; table = tbl1; expr = Phis; unit = V
  pev4: EvalPoint "Copper" | data = cpt4; table = tbl1; expr = T; unit = degC

Tables
  tbl1: Table
    // Point Evaluation 1 (Phis)
    Time (s) | T (degC), Point: (-0.4, 75, 170) | T (degC) | T (degC), Point: (-0.4, 125, 45) | Phis (V), Point: (-0.4, 112.5, 377.4) | T (degC), Point: (-3.25, 112.5, 326.6)
    0 | 23.849 | 23.8491 | 23.8491 | 3.30509 | 23.8495
    1 | 23.8821 | 23.8681 | 23.8592 | 3.33906 | 23.852
    2 | 23.9161 | 23.886 | 23.8681 | 3.3488 | 23.8543
    3 | 23.9511 | 23.9048 | 23.8778 | 3.35678 | 23.8561
    4 | 23.9866 | 23.9249 | 23.8886 | 3.36311 | 23.858
    5 | 24.0223 | 23.9452 | 23.8995 | 3.36904 | 23.8599
    6 | 24.058 | 23.9663 | 23.9112 | 3.3743 | 23.8622
    7 | 24.0938 | 23.9878 | 23.9233 | 3.37919 | 23.8648
    8 | 24.1296 | 24.0101 | 23.9364 | 3.38354 | 23.8681
    9 | 24.1652 | 24.0332 | 23.9506 | 3.38735 | 23.8721
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
Plots
  pg1: PlotGroup3D "T" | data = dset1
    vol1: Volume | expr = T; unit = degC; descr = Dependent variable T
    con1: Contour | expr = T; unit = degC; descr = Dependent variable T
    arwv1: ArrowVolume (disabled) | expr = {Phisx, Phisy, Phisz}; xnumber = 8; znumber = 21
  pg2: PlotGroup1D "Table Plot" | data = dset1
    tblp1: Table "Table Graph 1" | table = tbl1; plotcolumninput = manual
  pg3: PlotGroup1D "Phie" | data = dset1
    lngr1: LineGraph | data = cln1; expr = Phie; descr = Dependent variable Phie; xdata = expr; xdataexpr = x
  pg4: PlotGroup1D "ik" | data = dset1
    lngr1: LineGraph | data = cln1; expr = ik; unit = A/m^2; xdata = expr; xdataexpr = x
  pg5: PlotGroup1D "SOC" | data = dset1
    lngr1: LineGraph | data = cln1; expr = q; unit = 1; descr = Dependent variable q; xdata = expr; xdataexpr = x

Exports
  tbl1: Table | table = tbl1; filename = /Users/howiechu/Desktop/Model/Celli/SOC30/Transient/Matlab/Run_4c_100s.txt
  img1: Image3D "Image 1"
    size = manualweb
    weblockratio = off
    webwidth = 800
    webheight = 500
    webresolution = 300
    sizedesc = 68 x 42 mm
    printlockratio = off
    printwidth = 6
    printheight = 6
    printresolution = 600
    pngfilename = /Users/howiechu/Desktop/Model/Celli/SOC30/Transient/Matlab/ModImg.png
    options = on